Thu Jun 14 18:34:37 CEST 2018
popkin304
$PROB  TMDD Qss model for alirocumab
; Reference:
; Djebli N, Martinez JM, Lohan L, Khier S, Brunet A, Hurbin F, et al.
; Target-mediated drug disposition population pharmacokinetics model of alirocumab in
; healthy volunteers and patients: pooled analysis of randomized phase I/II/III studies.
; Clin Pharmacokinet. 2017

$INPUT ID TIME TAD AMT RATE DV MDV EVID CMT ISC DISST AGE SEX WT BMI CLCR GFR BSLDLC FIBR EZE STATIN TBSPCSK FBSPCSK ARM ABDO THIGH STUD

$DATA dataset.csv IGNORE=@

$SUBROUTINE ADVAN13 TOL=5

$MODEL NCOMP=4
       COMP=(DEPOT)
       COMP=(SARTOT)
       COMP=(TPCSK9)
       COMP=(PERIPH)

$PK

   TVCL = THETA(1)
   TKON = THETA(2)
   TKIN = THETA(3)
   TKDE = THETA(4)
   TVQ  = THETA(5)
   TVV1 = THETA(6)
   TVV2 = THETA(7)
   TVKA = THETA(8)
   TVF  = THETA(9)
   TVEP = THETA(10)
   TVEA = THETA(11)
   TVLAG = THETA(12)
   COV1   = THETA(13)

  ETCL   = ETA(1)
  EKON   = ETA(2)
  EKIN   = ETA(3)
  EKDE   = ETA(4)
  ETQ    = ETA(5)
  ETV1   = ETA(6)
  ETV2   = ETA(7)
  ETKA   = ETA(8)
  ETF    = ETA(9)

    CL   = TVCL * EXP(ETCL)
    KON  = TKON * EXP(EKON)
    KINT = TKIN * EXP(EKIN)
    KDEG = TKDE * EXP(EKDE)
    Q    = TVQ  * EXP(ETQ)

COV1V1 = TVV1 * COV1 ** DISST

    V1 = COV1V1 * EXP(ETV1)

    V2   = TVV2 * EXP(ETV2)
    KA   = TVKA * EXP(ETKA)
   ALAG1 = TVLAG

IF (ISC .EQ.0) THEN

 F1=1
ELSE
PHI = LOG(TVF/(1-TVF))
 F1 = EXP(PHI+ETF)/(1+EXP(PHI+ETF))
ENDIF

  KEL = CL / V1
  KPT = Q / V1
  KTP = Q / V2

KSS = 0.58 + KINT/KON

SARBASE = 0
KSYN = TBSPCSK * KDEG

A_0(2) = SARBASE
A_0(3) = TBSPCSK * V1

S2=V1
S3=V1

$DES
C2=A(2)/V1
C3=A(3)/V1
C4=A(4)/V2
DADT(1)= -KA * A(1) * ISC * F1

K1 = C2 - C3 - KSS
SARF = 0.5*(K1+ SQRT(K1*K1 + 4*KSS*C2))

DADT(2)= KA*A(1)*ISC*F1-(KEL+KPT)*SARF*V1-KINT*A(3)*SARF/(KSS+SARF)+KTP*C4*V2

DADT(3)= KSYN  * V1 - KDEG * A(3)- (KINT - KDEG) * SARF * A(3)/(KSS + SARF)

DADT(4)= KPT* SARF * V1 - KTP * A(4)

;A(1) = DOSE
;SARF = [SAR_LIBRE]
;A(2) = [SARtot]*V1
;A(3) = [PCSK9tot]*V1
;A(4) = [L tissulaire]*V2

; PCSK9SAR = TPCSK9 * SARF/(KSS + SARF) => surprediction possible du complexe au
;tps initial !!!

$ERROR

IPRED=F
SAV=0
IF (IPRED.EQ.0) SAV=0.00001
W=F
IRES=DV-IPRED
IWRES=IRES/(W+SAV)

Y=F+SQRT(TVEA*TVEA + TVEP*TVEP*F*F)*EPS(1)

$THETA ( 0.0 0.20 1000000.0 ) ; TVCL
$THETA ( 559 559 559 ) ; TKON
$THETA ( 0.0 0.25 1000000.0 ) ; TKIN
$THETA ( 0.0 2.00 1000000.0 ) ; TKDE
$THETA ( 0.0 1.00 1000000.0 ) ; TVQ
$THETA ( 2.0 4.00 1000000.0 ) ; TVV1 SART
$THETA (   2.612   2.612       2.612 ) ; TVV2
$THETA ( 0.0 0.50 1000000.0 ) ; TVKA
$THETA (   0.550   0.750       1.000 ) ; TVF
$THETA ( 0.0 0.30 1000000.0 ) ; TVEP
$THETA ( 0.0 0.05 1000000.0 ) ; TVEA
$THETA ( 0.0 0.05  100) ; LAG
$THETA 1 ; COV1

$OMEGA 0.5
$OMEGA 0 FIX
$OMEGA 0.5
$OMEGA 0.5
$OMEGA 0.5
$OMEGA 0.5
$OMEGA 0 FIX
$OMEGA 0.5
$OMEGA 0.5

$SIGMA  1 FIX


$ESTIMATION METHOD=1 INTERACTION PRINT=1 MAXEVAL=9999 NOABORT POSTHOC

$COVARIANCE PRINT=E MATRIX=S

$TAB ID TIME DV IPRED PRED CMT IRES CWRES IWRES NOHEADER NOPRINT NOAPPEND FORMAT=,1PE11.4 FILE=sdtab
$TAB ID TIME CL KON KSS KINT KDEG Q V1 V2 KA ALAG1 F1 ETAS(1:LAST) NOHEADER NOPRINT NOAPPEND FORMAT=,1PE11.4 FILE=patab
$TAB ID TIME AGE WT BMI CLCR GFR BSLDLC TBSPCSK FBSPCSK NOHEADER NOPRINT NOAPPEND FORMAT=,1PE11.4 FILE=cotab
$TAB ID TIME ISC DISST SEX FIBR EZE STATIN ARM ABDO THIGH STUD NOHEADER NOPRINT NOAPPEND FORMAT=,1PE11.4 FILE=catab

NM-TRAN MESSAGES
 WARNINGS AND ERRORS (IF ANY) FOR PROBLEM    1
 (WARNING  2) NM-TRAN INFERS THAT THE DATA ARE POPULATION.
 (DATA WARNING   5) RECORD         4, DATA ITEM   6, CONTENTS: 0.863013699
 THE DV DATA ITEM IS POSITIVE, BUT THE MDV DATA ITEM IS 1
 (DATA WARNING   5) RECORD         6, DATA ITEM   6, CONTENTS: 2.04109589
 THE DV DATA ITEM IS POSITIVE, BUT THE MDV DATA ITEM IS 1
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
1NONLINEAR MIXED EFFECTS MODEL PROGRAM (NONMEM) VERSION 7.3.0
 ORIGINALLY DEVELOPED BY STUART BEAL, LEWIS SHEINER, AND ALISON BOECKMANN
 CURRENT DEVELOPERS ARE ROBERT BAUER, ICON DEVELOPMENT SOLUTIONS,
 AND ALISON BOECKMANN. IMPLEMENTATION, EFFICIENCY, AND STANDARDIZATION
 PERFORMED BY NOUS INFOSYSTEMS.
 PROBLEM NO.:         1
 TMDD Qss model for alirocumab
 TOT. NO. OF OBS RECS:     9379
 TOT. NO. OF INDIVIDUALS:    527
 GENERAL NONLINEAR KINETICS MODEL USING LSODA (ADVAN13)
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 #TBLN:      1
 #METH: First Order Conditional Estimation with Interaction
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
 #TERM:
0MINIMIZATION SUCCESSFUL
 HOWEVER, PROBLEMS OCCURRED WITH THE MINIMIZATION.
 REGARD THE RESULTS OF THE ESTIMATION STEP CAREFULLY, AND ACCEPT THEM ONLY
 AFTER CHECKING THAT THE COVARIANCE STEP PRODUCES REASONABLE OUTPUT.
 NO. OF FUNCTION EVALUATIONS USED:     2793
 NO. OF SIG. DIGITS IN FINAL EST.:  3.1

 ETABAR IS THE ARITHMETIC MEAN OF THE ETA-ESTIMATES,
 AND THE P-VALUE IS GIVEN FOR THE NULL HYPOTHESIS THAT THE TRUE MEAN IS 0.

 ETABAR:        -4.3686E-02  0.0000E+00  1.8409E-02 -2.2961E-02  3.4890E-03 -9.3535E-03  0.0000E+00 -3.4856E-02 -1.6396E-02
 SE:             8.5982E-03  0.0000E+00  8.3545E-03  1.3205E-02  2.8001E-03  9.2159E-03  0.0000E+00  1.5513E-02  1.3154E-02
 N:                     527         527         527         527         527         527         527         527         527

 P VAL.:         3.7654E-07  1.0000E+00  2.7564E-02  8.2059E-02  2.1276E-01  3.1014E-01  1.0000E+00  2.4651E-02  2.1260E-01

 ETAshrink(%):   6.2609E+01  1.0000E+02  2.0351E+01  2.6524E+01  7.5525E+01  3.2709E+01  1.0000E+02  4.7695E+01  4.3827E+01
 EBVshrink(%):   6.4384E+01  0.0000E+00  2.0047E+01  2.7274E+01  7.6527E+01  3.2208E+01  0.0000E+00  4.9156E+01  4.4314E+01
 EPSshrink(%):   6.2613E+00

 #TERE:
 Elapsed estimation time in seconds: 30683.02
 Elapsed covariance time in seconds:   653.15

 ********************               FIRST ORDER CONDITIONAL ESTIMATION WITH INTERACTION              ********************
 #OBJT:**************                       MINIMUM VALUE OF OBJECTIVE FUNCTION                      ********************
 #OBJV:********************************************    48465.977       **************************************************

 ********************               FIRST ORDER CONDITIONAL ESTIMATION WITH INTERACTION              ********************
 ********************                             FINAL PARAMETER ESTIMATE                           ********************

 THETA - VECTOR OF FIXED EFFECTS PARAMETERS   *********
         TH 1      TH 2      TH 3      TH 4      TH 5      TH 6      TH 7      TH 8      TH 9      TH10      TH11      TH12
          TH13
         1.72E-01  5.59E+02  1.24E-01  1.35E+00  5.00E-01  3.23E+00  2.61E+00  6.38E-01  5.90E-01  2.75E-01  5.82E-01  2.98E-02
          1.56E+00

 OMEGA - COV MATRIX FOR RANDOM EFFECTS - ETAS  ********
            ETA1      ETA2      ETA3      ETA4      ETA5      ETA6      ETA7      ETA8      ETA9
 ETA1
+        2.79E-01
 ETA2
+        0.00E+00  0.00E+00
 ETA3
+        0.00E+00  0.00E+00  5.81E-02
 ETA4
+        0.00E+00  0.00E+00  0.00E+00  1.71E-01
 ETA5
+        0.00E+00  0.00E+00  0.00E+00  0.00E+00  6.91E-02
 ETA6
+        0.00E+00  0.00E+00  0.00E+00  0.00E+00  0.00E+00  9.90E-02
 ETA7
+        0.00E+00  0.00E+00  0.00E+00  0.00E+00  0.00E+00  0.00E+00  0.00E+00
 ETA8
+        0.00E+00  0.00E+00  0.00E+00  0.00E+00  0.00E+00  0.00E+00  0.00E+00  4.64E-01
 ETA9
+        0.00E+00  0.00E+00  0.00E+00  0.00E+00  0.00E+00  0.00E+00  0.00E+00  0.00E+00  2.90E-01

 SIGMA - COV MATRIX FOR RANDOM EFFECTS - EPSILONS  ****
            EPS1
 EPS1
+        1.00E+00

 OMEGA - CORR MATRIX FOR RANDOM EFFECTS - ETAS  *******
            ETA1      ETA2      ETA3      ETA4      ETA5      ETA6      ETA7      ETA8      ETA9
 ETA1
+        5.28E-01
 ETA2
+        0.00E+00  0.00E+00
 ETA3
+        0.00E+00  0.00E+00  2.41E-01
 ETA4
+        0.00E+00  0.00E+00  0.00E+00  4.13E-01
 ETA5
+        0.00E+00  0.00E+00  0.00E+00  0.00E+00  2.63E-01
 ETA6
+        0.00E+00  0.00E+00  0.00E+00  0.00E+00  0.00E+00  3.15E-01
 ETA7
+        0.00E+00  0.00E+00  0.00E+00  0.00E+00  0.00E+00  0.00E+00  0.00E+00
 ETA8
+        0.00E+00  0.00E+00  0.00E+00  0.00E+00  0.00E+00  0.00E+00  0.00E+00  6.82E-01
 ETA9
+        0.00E+00  0.00E+00  0.00E+00  0.00E+00  0.00E+00  0.00E+00  0.00E+00  0.00E+00  5.38E-01

 SIGMA - CORR MATRIX FOR RANDOM EFFECTS - EPSILONS  ***
            EPS1
 EPS1
+        1.00E+00

 ********************               FIRST ORDER CONDITIONAL ESTIMATION WITH INTERACTION              ********************
 ********************                            STANDARD ERROR OF ESTIMATE                          ********************

 THETA - VECTOR OF FIXED EFFECTS PARAMETERS   *********
         TH 1      TH 2      TH 3      TH 4      TH 5      TH 6      TH 7      TH 8      TH 9      TH10      TH11      TH12
          TH13
         1.52E-02 .........  2.22E-03  3.75E-02  2.86E-02  2.04E-01 .........  4.68E-02  2.39E-02  1.51E-03  2.24E-02  1.10E-03
          8.51E-02

 OMEGA - COV MATRIX FOR RANDOM EFFECTS - ETAS  ********
            ETA1      ETA2      ETA3      ETA4      ETA5      ETA6      ETA7      ETA8      ETA9
 ETA1
+        7.61E-02
 ETA2
+       ......... .........
 ETA3
+       ......... .........  4.62E-03
 ETA4
+       ......... ......... .........  1.64E-02
 ETA5
+       ......... ......... ......... .........  2.98E-02
 ETA6
+       ......... ......... ......... ......... .........  1.66E-02
 ETA7
+       ......... ......... ......... ......... ......... ......... .........
 ETA8
+       ......... ......... ......... ......... ......... ......... .........  4.95E-02
 ETA9
+       ......... ......... ......... ......... ......... ......... ......... .........  7.17E-02

 SIGMA - COV MATRIX FOR RANDOM EFFECTS - EPSILONS  ****
            EPS1
 EPS1
+       .........

 OMEGA - CORR MATRIX FOR RANDOM EFFECTS - ETAS  *******
            ETA1      ETA2      ETA3      ETA4      ETA5      ETA6      ETA7      ETA8      ETA9
 ETA1
+        7.20E-02
 ETA2
+       ......... .........
 ETA3
+       ......... .........  9.59E-03
 ETA4
+       ......... ......... .........  1.99E-02
 ETA5
+       ......... ......... ......... .........  5.66E-02
 ETA6
+       ......... ......... ......... ......... .........  2.64E-02
 ETA7
+       ......... ......... ......... ......... ......... ......... .........
 ETA8
+       ......... ......... ......... ......... ......... ......... .........  3.63E-02
 ETA9
+       ......... ......... ......... ......... ......... ......... ......... .........  6.67E-02

 SIGMA - CORR MATRIX FOR RANDOM EFFECTS - EPSILONS  ***
            EPS1
 EPS1
+       .........
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
 ********************               FIRST ORDER CONDITIONAL ESTIMATION WITH INTERACTION              ********************
 ********************                      EIGENVALUES OF COR MATRIX OF ESTIMATE                     ********************

             1         2         3         4         5         6         7         8         9        10        11        12
             13        14        15        16        17        18
         4.98E-02  2.00E-01  2.67E-01  3.97E-01  4.80E-01  5.74E-01  6.84E-01  7.12E-01  7.98E-01  8.89E-01  9.19E-01  1.10E+00
          1.25E+00  1.29E+00  1.64E+00  2.03E+00  2.06E+00  2.66E+00
 #CPUT: Total CPU Time in Seconds,   288728.461
